*Heading
 MyCube
** Job name: MyCube Model name: Model-1
** Generated by: Abaqus/CAE 2019
*Preprint, echo=NO, model=NO, history=NO, contact=NO
**
** PARTS
**
*Part, name=MyCube
*Node
      1,  -3.33333333,          -5.,           8.
      2,   3.33333333,          -5.,           8.
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*Element, type=C3D8R
1, 8, 5, 6, 7, 1, 2, 3, 4
2, 12, 11,  5,  8,  9, 10,  2,  1
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*Nset, nset=Set_statistic_material_1, generate
   1,  120,    1
*Elset, elset=Set_statistic_material_1, generate
  1,  60,   1
*End Part
**
**
** ASSEMBLY
**
*Assembly, name=Assembly
**
*Instance, name=MyCube-1, part=MyCube
          0.,           0.,         -10.
*End Instance
**
*End Assembly
**
** MATERIALS
**
*Material, name=Uranium
*Density
 -18.7,
